# Grupo de Pesquisa e Desenvolvimento
# em Sistemas Elétricos e Computacionais
# Projeto Conversor Boost Bridgeless Totem-Pole + LLC
# Eng. Giancarlo Clerici Daros
# 03/11/2020
# Especificações de Projeto
V_inmin := 85 V  # ............................................... Tensão de Entrada Mínima
V_inmax := 265 V  # ............................................... Tensão de Entrada Máxima
V_in := 85 V, 95 V .. 265 V
V_n := V_inmin*sqrt(2) = 120.208 V
V_m := V_inmax*sqrt(2) = 374.767 V
V_bus := 500 V
V_bat := 2.4 V
n_bat := 12
V_out := n_bat*V_bat = 28.8 V
I_out := 25 A
P_out := V_out*I_out = 720 W
I_bus := P_out/V_bus = 1.44 A
f_r := 60 Hz
R_o := V_bus/I_bus = 347.222 Ω
f_sw := 100 kHz
# Projeto da Indutância
L_boost == D^2*T_s/(P_out*T_R)*integral(V_in(t)^2*(1 + V_in(t)/(V_bus - V_in(t))), t = 0 .. T_R/2)
# Em que
D_critico(V_in) := (V_bus - sqrt(2)*V_in)/V_bus
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T_s := 1/f_sw = 10 μs
T_r := 1/f_r = 16.6667 ms
ω := 2*π*f_r
V_inx(V_in, t) := sqrt(2)*V_in*sin(ω*t)
# Projetando para o ponto de mínima tensão:
D_critico(85 V) = 0.759584
# Projetando para o ponto de máxima tensão:
D_critico(265 V) = 0.250467
# Escolhemos
D_boost_m := 0.2
# Escolhemos
D_boost_n := 0.5
L_boost_m(V_in) := D_boost_m^2*T_s/(P_out*T_r)*integral(V_inx(V_in, t)^2*(1 + V_inx(V_in, t)/(V_bus - V_inx(V_in, t))), t = 0 .. T_r/2)
L_boost_n(V_in) := D_boost_n^2*T_s/(P_out*T_r)*integral(V_inx(V_in, t)^2*(1 + V_inx(V_in, t)/(V_bus - V_inx(V_in, t))), t = 0 .. T_r/2)
L_boost_max := L_boost_m(265 V) = 58.9162 μH
L_boost_min := L_boost_n(85 V) = 15.799 μH
# Projeto Filtro de Entrada [Dissertação Kirsten] | Projeto Filtro de Entrada [Dissertação Kirsten]
# Cut-off frequency ......................................................................
f_c := 0.1*f_sw  # Cut-off frequency ......................................................................
# Damping factor ........................................................................
ξ := 0.707  # Damping factor ........................................................................
Iin_x_m := V_inmax*sqrt(2)*D_boost_m/(L_boost_max*f_sw) = 12.722 A
Iin_x_n := V_inmax*sqrt(2)*D_boost_n/(L_boost_min*f_sw) = 118.604 A
R_fx_m := V_inmax*sqrt(2)/Iin_x_m = 29.4581 Ω
R_fx_n := V_inmax*sqrt(2)/Iin_x_n = 3.15981 Ω
265*sqrt(2) = 374.767
C_fx_m := 1/(4*ξ*π*f_c*R_fx_m) = 382.09 nF
C_fx_n := 1/(4*ξ*π*f_c*R_fx_n) = 3.56213 μF
L_fx_m := 1/((2*π*f_c)^2*C_fx_m) = 0.66294 mH
L_fx_n := 1/((2*π*f_c)^2*C_fx_n) = 71.11 μH
# Razão Cíclica p/ Diferente Vin | Razão Cíclica p/ Diferente Vin
V_inc(V_in, t) := V_in*sqrt(2)*sin(ω*t)
V_inc(V_in, t) := V_in*sqrt(2)*sin(ω*t)
D_b_m(P_out, V_in) := P_out*T_r*sqrt(L_boost_max*T_s*V_bus*integral(V_inc(V_in, t)^2/(V_bus - V_inc(V_in, t)), t = 0 .. T_r/2)/(P_out*T_r))/(T_s*V_bus*integral(V_inc(V_in, t)^2/(V_bus - V_inc(V_in, t)), t = 0 .. T_r/2))
D_b_n(P_out, V_in) := P_out*T_r*sqrt(L_boost_min*T_s*V_bus*integral(V_inc(V_in, t)^2/(V_bus - V_inc(V_in, t)), t = 0 .. T_r/2)/(P_out*T_r))/(T_s*V_bus*integral(V_inc(V_in, t)^2/(V_bus - V_inc(V_in, t)), t = 0 .. T_r/2))
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D_b_m(P_out, 265 V) = 0.2
D_b_n(P_out, 85 V) = 0.5
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D_b_n(P_out, 85 V) = 0.5
D_f := D_b_m(P_out, 85 V) - D_b_m(P_out, 265 V) = 0.765544
D_b_n(P_out, 265 V) = 0.103569
D_ff := D_b_n(P_out, 85 V) - D_b_n(P_out, 265 V) = 0.396431
ΔV_bus% := 2 %
ΔV_bus := ΔV_bus%*V_bus = 10 V
C_ccm := P_out/(2*π*f_r*V_bus*ΔV_bus) = 381.972 μF
# Operação em CCM
I_Lccm(V_in) := V_bus^2/(R_o*V_in)
Δi_Lccm% := 10 %
D_CCM(V_in) := 1 - sqrt(2)*V_in/V_bus
D_CCM(85 V) = 0.759584
D_CCM(265 V) = 0.250467
D_ccm_n := 0.8
D_ccm_m := 0.25
Δi_Lccm(V_in) := Δi_Lccm%*I_Lccm(V_in)
L_CCM_n(V_in) := V_in*D_ccm_n/(Δi_Lccm(V_in)*f_sw)
L_CCM(V_in) := V_in*D_ccm_m/(Δi_Lccm(V_in)*f_sw)
L_CCM_n(85 V) = 802.778 μH
L_CCM(265 V) = 2.43837 mH
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L_CCM(177 V) = 0.00108781 H
L_CCM(85 V) = 250.868 μH
L_CCM(265 V) = 2.43837 mH
